*Heading
** Job name: Job-1 Model name: Model-1
** Generated by: Abaqus/CAE 6.13-1
*Preprint, echo=NO, model=NO, history=NO, contact=NO
**
** PARTS
**
*Part, name=Block
*Node
      1,   9.41943073,   11.9138803
      2,   8.88885975,   11.6629391
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*Element, type=CPE4R
    1,  2667,  2828,  4093,   818
    2,  4093,  4240,  3855,   818
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*Nset, nset=Block, generate
     1,  12128,      1
*Elset, elset=Block, generate
     1,  11896,      1
** Section: Block
*Solid Section, elset=Block, material=Material-1
,
*End Part
**
**
** ASSEMBLY
**
*Assembly, name=Assembly
**
*Instance, name=BLOCK-1, part=Block
*End Instance
**
*Nset, nset=Set-1, instance=BLOCK-1, generate
     1,  12128,      1
*Elset, elset=Set-1, instance=BLOCK-1, generate
     1,  11896,      1
*Nset, nset=Set-2, instance=BLOCK-1
   70,  166,  167,  168,  169,  170
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*Elset, elset=Set-2, instance=BLOCK-1
   46,   47,   48,   49,  107,  155
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*Nset, nset=Set-3, instance=BLOCK-1
   69,   71,   72,   73,   74,   75
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*Elset, elset=Set-3, instance=BLOCK-1
  110,  861,  866,  867,  897,  898
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*Nset, nset=Set-4, instance=BLOCK-1
   22,   23,   24,   25,   26,   27
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*Elset, elset=Set-4, instance=BLOCK-1
   53,   55,  584,  588,  591,  592
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*Elset, elset=_Surf-1_S1, internal, instance=BLOCK-1
  424,  426,  545,  896,  976, 1015
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*Elset, elset=_Surf-1_S3, internal, instance=BLOCK-1
  560,  561, 1434, 1447, 1453, 4121, 4126, 4134, 4365
*Elset, elset=_Surf-1_S4, internal, instance=BLOCK-1
  897, 1452, 4109
*Elset, elset=_Surf-1_S2, internal, instance=BLOCK-1
 4007, 4009, 4011, 4465, 4466
*Surface, type=ELEMENT, name=Surf-1
_Surf-1_S1, S1
_Surf-1_S3, S3
_Surf-1_S4, S4
_Surf-1_S2, S2
*End Assembly
**
** MATERIALS
**
*Material, name=Material-1
*Density
 2.7e+06,
*Elastic
 7.52259e+09, 0.352214
*Concrete Damaged Plasticity
10.,  0.1, 1.16, 0.67,   0.
*Concrete Compression Hardening
 3.06996e+06,          0.
   3.417e+06, 0.000126506
 3.75583e+06, 0.000253013
 4.08644e+06, 0.000379519
 4.40885e+06, 0.000506026
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       1e+06,   0.0126506
*Concrete Tension Stiffening
 2.24136e+06,          0.
 2.21284e+06, 5.79457e-06
 2.18468e+06, 1.15891e-05
 2.15688e+06, 1.73837e-05
 2.12944e+06, 2.31783e-05
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     622807., 0.000579457
*Concrete Compression Damage
         0.,          0.
 0.00841006, 0.000126506
  0.0168201, 0.000253013
  0.0252302, 0.000379519
  0.0336403, 0.000506026
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   0.841006,   0.0126506
*Concrete Tension Damage
        0.,          0.
 0.0179482, 5.79457e-06
 0.0355742, 1.15891e-05
 0.0528837, 1.73837e-05
 0.0698825, 2.31783e-05
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  0.836445, 0.000579457
**
** BOUNDARY CONDITIONS
**
** Name: BC-1 Type: Displacement/Rotation
*Boundary
Set-2, 1, 1
Set-2, 6, 6
** Name: BC-2 Type: Displacement/Rotation
*Boundary
Set-3, 1, 1
Set-3, 6, 6
** Name: BC-4 Type: Displacement/Rotation
*Boundary
Set-4, 2, 2
Set-4, 6, 6
**
** PREDEFINED FIELDS
**
** Name: Predefined Field-2   Type: Geostatic stress
*Initial Conditions, type=STRESS, GEOSTATIC
Set-1, -1e+07, 0., -9.8e+06, 20., 0.4, 0.4
** ----------------------------------------------------------------
**
** STEP: Step-1
**
*Step, name=Step-1, nlgeom=NO
*Geostatic
**
** LOADS
**
** Name: Load-1   Type: Pressure
*Dsload
Surf-1, P, 1e+07
**
** OUTPUT REQUESTS
**
*Restart, write, frequency=0
**
** FIELD OUTPUT: F-Output-2
**
*Output, field
*Element Output, directions=YES
DAMAGEC, DAMAGET
**
** FIELD OUTPUT: F-Output-1
**
*Output, field, variable=PRESELECT
**
** HISTORY OUTPUT: H-Output-1
**
*Output, history, variable=PRESELECT
*End Step
** ----------------------------------------------------------------
**
** STEP: Step-2
**
*Step, name=Step-2, nlgeom=NO
*Dynamic
1.,1.,1e-05
**
** OUTPUT REQUESTS
**
*Restart, write, frequency=0
**
** FIELD OUTPUT: F-Output-2
**
*Output, field, frequency=1
*Element Output, directions=YES
DAMAGEC, DAMAGET
**
** FIELD OUTPUT: F-Output-1
**
*Output, field, variable=PRESELECT, frequency=1
**
** HISTORY OUTPUT: H-Output-1
**
*Output, history, variable=PRESELECT, frequency=1
*End Step
